integral(exp(x)*cos(x)^2, x = 0 .. π) = 13.2844
solve block
    # guess values
    a := 0.861
    # constraints
    integral(x^0.3*(ln(1.1*x) + x), x = 0.1 .. a) == 0
    # solver
    find(a) = 0.972776
end solve block
solve block
    # guess values
    x1 := 1
    x2 := 2
    x3 := 3
    x4 := 1
    # constraints
    1.5*x1 + 3.9*x2 + 0.8*x3 + 9*x4 == -0.3
    2.3*x1 - 3*x2 + 4.1*x3 - 8.2*x4 == 1.5
    4.4*x1 + 5*x2 - 0.9*x3 + 7.6*x4 == 9
    1.8*x1 + 0.2*x2 + 6.2*x3 - 3*x4 == 0.1
    # solver
    find(x1, x2, x3, x4) = [1.2697; 2.20229; -0.962435; -1.11373]
end solve block
solve block
    # guess values
    x := 1
    # constraints
    3*ln(x)^2 + 6*ln(x) - 5 == 0
    # solver
    find(x) = 1.88324
end solve block
