# Worksheet setting: ORIGIN = 1
ORIGIN := 1
i := 1, 2 .. 5
j := 1, 2 .. 5
xg := [1.1; 1.3; 1.6; 2.1; 2.2; 2.6; 2.9; 3]
n := length(xg) = 8
A[i, j] := sum(xg[k]^(i + j - 2), k = 1 .. n)
A = [
    8, 16.8, 38.88, 96.498, 251.173;
    16.8, 38.88, 96.498, 251.173, 675.112;
    38.88, 96.498, 251.173, 675.112, 1855.26;
    96.498, 251.173, 675.112, 1855.26, 5179.78;
    251.173, 675.112, 1855.26, 5179.78, 14632
]
yg := [2.1; 2.8; -4.4; 3.6; -8.7; 7.2; 7.6; 3.4]
B[i] := sum(yg[k]*xg[k]^(i - 1), k = 1 .. n)
B = [13.6; 38.29; 112.965; 335.33; 990.403]
solve block
    # guess values
    X := [1; 1; 1; 1; 1]
    # constraints
    A*X == B
    # solver
    Alp := find(X) = [-239.106; 594.508; -519.447; 189.081; -24.3302]
end solve block
F(x) := [1; x; x^2; x^3; x^4]
i := 1, 2 .. 8
P[i] := sum(Alp[j]*xg[i]^(j - 1), j = 1 .. 5)
P = [2.36612; 1.80931; -2.65393; -3.50079; -1.9306; 6.60351; 7.07843; 3.82795]
govno := linfit(xg, yg, F) = [-239.106; 594.508; -519.447; 189.081; -24.3302]
yres2[i] := sum(govno[j]*xg[i]^(j - 1), j = 1 .. 5) = [2.36612; 1.80931; -2.65393; -3.50079; -1.9306; 6.60351; 7.07843; 3.82795]
yres[i] := sum(Alp[j]*xg[i]^(j - 1), j = 1 .. 5) = [2.36612; 1.80931; -2.65393; -3.50079; -1.9306; 6.60351; 7.07843; 3.82795]
otkl[i] := (yres[i] - yg[i])^2
otkl2[i] := (yres2[i] - yg[i])^2
yres = [2.36612; 1.80931; -2.65393; -3.50079; -1.9306; 6.60351; 7.07843; 3.82795]
yg = [2.1; 2.8; -4.4; 3.6; -8.7; 7.2; 7.6; 3.4]
yres2 = [2.36612; 1.80931; -2.65393; -3.50079; -1.9306; 6.60351; 7.07843; 3.82795]
otkl = [0.0708183; 0.981468; 3.04875; 50.4212; 45.8248; 0.355795; 0.272038; 0.183144]
otkl2 = [0.0708183; 0.981468; 3.04875; 50.4212; 45.8248; 0.355795; 0.272038; 0.183144]
sumotck := sum(otkl[j], j = 1 .. 8) = 101.158
sumotck2 := sum(otkl2[j], j = 1 .. 8) = 101.158
y[1] := 1
a := 0
b := 0.5
h := 0.02
n := (b - a)/h = 25
F(x, y) := (exp(x)*x - y[1])/2
solution := rkfixed(y, a, b, n, F)
solution = [
    0, 1;
    0.02, 0.990151;
    0.04, 0.980607;
    0.06, 0.971373;
    0.08, 0.962455;
    0.1, 0.953859;
    0.12, 0.945591;
    0.14, 0.937655;
    0.16, 0.93006;
    0.18, 0.922812;
    0.2, 0.915916;
    0.22, 0.909381;
    0.24, 0.903214;
    0.26, 0.897422;
    0.28, 0.892012;
    0.3, 0.886994;
    0.32, 0.882374;
    0.34, 0.878163;
    0.36, 0.874368;
    0.38, 0.870998;
    0.4, 0.868064;
    0.42, 0.865575;
    0.44, 0.863541;
    0.46, 0.861972;
    0.48, 0.860878;
    0.5, 0.860272
]
# sin((x - 0.73)^2 + 0.33 * y^2)
solve block
    # guess values
    x := 0.304
    y := 0.104
    G(x, y) := sin((x - 0.73)^2 + 0.33*y^2) + cos(0.51*(x - 0.79)^2 + 1.35*(y - 1.38)^2) + 0.78*x^2 + 0.91*y^2
    # solver
    sol := minimize(G, x, y) = [0.401424; -0.109935]
    G(sol[1], sol[2]) = -0.749303
end solve block
